// SBML level 2 version 1

model Model_3()
  // Model 3: One branch plus receptor degradation

  // Compartments:
  compartment cell = 1;

  // Species:
  species EGF in cell = 1000/cell;
  species boundEGFR in cell = 0;
  species unboundEGFR in cell = 500/cell;
  species activeSos in cell = 0;
  species inactiveSos in cell = 1200/cell;
  species activeRas in cell = 0;
  species inactiveRas in cell = 1200/cell;
  species cRaf in cell = 1500/cell;
  species cRafPP in cell = 0;
  species MEK in cell = 3000/cell;
  species MEKPP in cell = 0;
  species ERK in cell = 10000/cell;
  species ERKPP in cell = 0;
  species removedSos in cell = 0;
  species PKA in cell = 0;
  species removedcRaf in cell = 0;
  species inactivePKA in cell = 1000/cell;
  species EPAC in cell = 0;
  species inactiveEPAC in cell = 1000/cell;
  species activeRap1 in cell = 0;
  species inactiveRap1 in cell = 1200/cell;
  species BRaf in cell = 1500/cell;
  species BRafPP in cell = 0;
  species Gap in cell = 2400/cell;
  species EPACA in cell = 0;
  species Cilostamide in cell = 0;
  species PKAA in cell = 0;
  species degradedEGFR in cell = 0;

  // Parameters:
  SosKcat = 0.0005929105;
  SosKm = 8782.3224;

  // Reactions:
  SosActivation: inactiveSos + boundEGFR => activeSos + boundEGFR; SosActivation_Kcat*boundEGFR*inactiveSos/(SosActivation_Km + inactiveSos);
    SosActivation_Kcat = 0.49636114; SosActivation_Km = 1521.8559;
  EGFBingingToTheReceptor_forward: EGF + unboundEGFR => boundEGFR; EGFBingingToTheReceptor_forward_k1*EGF*unboundEGFR; EGFBingingToTheReceptor_forward is "EGFBingingToTheReceptor (forward)";
    EGFBingingToTheReceptor_forward_k1 = 2.9767572;
  EGFBingingToTheReceptor_backward: boundEGFR => EGF + unboundEGFR; EGFBingingToTheReceptor_backward_k1*boundEGFR; EGFBingingToTheReceptor_backward is "EGFBingingToTheReceptor (backward)";
    EGFBingingToTheReceptor_backward_k1 = 4193.1768;
  SosDeactivation: activeSos => inactiveSos; SosDeactivation_V*activeSos/(SosDeactivation_Km + activeSos);
    SosDeactivation_Km = 213.61511; SosDeactivation_V = 642.2989;
  RasActivation: inactiveRas + activeSos => activeRas + activeSos; RasActivation_Kcat*activeSos*inactiveRas/(RasActivation_Km + inactiveRas);
    RasActivation_Kcat = 0.29532745; RasActivation_Km = 5546.7048;
  RasDeactivation1: activeRas + Gap => inactiveRas + Gap; RasDeactivation1_Kcat*Gap*activeRas/(RasDeactivation1_Km + activeRas);
    RasDeactivation1_Kcat = 6.8350948; RasDeactivation1_Km = 9340.7933;
  cRafActivation: cRaf + activeRas => cRafPP + activeRas; cRafActivation_Kcat*cRaf*activeRas/(cRafActivation_Km + cRaf);
    cRafActivation_Kcat = 11.205923; cRafActivation_Km = 7704.2193;
  cRafDeactivation: cRafPP => cRaf; cRafDeactivation_V*cRafPP/(cRafDeactivation_Km + cRafPP);
    cRafDeactivation_Km = 10184.555; cRafDeactivation_V = 6725.565;
  MEKactivation: MEK + cRafPP => MEKPP + cRafPP; MEKactivation_Kcat*cRafPP*MEK/(MEKactivation_Km + MEK);
    MEKactivation_Kcat = 6.2394089; MEKactivation_Km = 12847.007;
  MEKdeactivation: MEKPP => MEK; MEKdeactivation_V*MEKPP/(MEKdeactivation_Km + MEKPP);
    MEKdeactivation_Km = 8636.6534; MEKdeactivation_V = 1414.5061;
  ERKactivation: ERK + MEKPP => ERKPP + MEKPP; ERKactivation_Kcat*ERK*MEKPP/(ERKactivation_Km + ERK);
    ERKactivation_Kcat = 1.8402771; ERKactivation_Km = 355.50632;
  SosInhibition: inactiveSos + ERKPP => removedSos + ERKPP; SosKcat*ERKPP*inactiveSos/(SosKm + inactiveSos);
  activeSosInhibition: activeSos + ERKPP => removedSos + ERKPP; SosKcat*activeSos*ERKPP/(SosKm + activeSos);
  cRafInhibition: cRaf + PKA => removedcRaf + PKA; cRafInhibition_Kcat*cRaf*PKA/(cRafInhibition_Km + cRaf);
    cRafInhibition_Kcat = 5.2040802; cRafInhibition_Km = 4929.1495;
  PKAActivation1: inactivePKA + PKAA => PKA + PKAA; PKAActivation1_Kcat*inactivePKA*PKAA/(PKAActivation1_Km + inactivePKA);
    PKAActivation1_Kcat = 20.634486; PKAActivation1_Km = 6958.4964;
  PKAactivation2: inactivePKA + Cilostamide => PKA + Cilostamide; PKAactivation2_Kcat*inactivePKA*Cilostamide/(PKAactivation2_Km + inactivePKA);
    PKAactivation2_Kcat = 4.1918767; PKAactivation2_Km = 3386.894;
  PKADeactivation: PKA => inactivePKA; PKADeactivation_V*PKA/(PKADeactivation_Km + PKA);
    PKADeactivation_Km = 4920.8824; PKADeactivation_V = 3954.6062;
  EPACActivation1: inactiveEPAC + EPACA => EPAC + EPACA; EPACActivation1_Kcat*inactiveEPAC*EPACA/(EPACActivation1_Km + inactiveEPAC);
    EPACActivation1_Kcat = 2.507601; EPACActivation1_Km = 2520.0802;
  EPACActivation2: inactiveEPAC + Cilostamide => EPAC + Cilostamide; EPACActivation2_Kcat*inactiveEPAC*Cilostamide/(EPACActivation2_Km + inactiveEPAC);
    EPACActivation2_Kcat = 13.187953; EPACActivation2_Km = 6062.3776;
  EPACDeactivation: EPAC => inactiveEPAC; EPACDeactivation_V*EPAC/(EPACDeactivation_Km + EPAC);
    EPACDeactivation_Km = 874.08545; EPACDeactivation_V = 13310.109;
  Rap1ActivationByEPAC: inactiveRap1 + EPAC => activeRap1 + EPAC; Rap1ActivationByEPAC_Kcat*inactiveRap1*EPAC/(Rap1ActivationByEPAC_Km + inactiveRap1);
    Rap1ActivationByEPAC_Kcat = 4.269598; Rap1ActivationByEPAC_Km = 11345.511;
  Rap1Deactivation: activeRap1 + Gap => inactiveRap1 + Gap; Rap1Deactivation_Kcat*activeRap1*Gap/(Rap1Deactivation_Km + activeRap1);
    Rap1Deactivation_Kcat = 14.490412; Rap1Deactivation_Km = 1851.5494;
  BRafActivation: BRaf + activeRap1 => BRafPP + activeRap1; BRafActivation_Kcat*BRaf*activeRap1/(BRafActivation_Km + BRaf);
    BRafActivation_Kcat = 3.0106482; BRafActivation_Km = 13438.836;
  BRafDeactivation: BRafPP => BRaf; BRafDeactivation_V*BRafPP/(BRafDeactivation_Km + BRafPP);
    BRafDeactivation_Km = 16349.646; BRafDeactivation_V = 72.960763;
  MEKactivation2: MEK + BRafPP => MEKPP + BRafPP; MEKactivation2_Kcat*MEK*BRafPP/(MEKactivation2_Km + MEK);
    MEKactivation2_Kcat = 0.93295935; MEKactivation2_Km = 2648.2865;
  BRafActivationByRas: BRaf + activeRas => BRafPP + activeRas; BRafActivationByRas_Kcat*BRaf*activeRas/(BRafActivationByRas_Km + BRaf);
    BRafActivationByRas_Kcat = 7.001641; BRafActivationByRas_Km = 2975.6608;
  ERKdeactivation: ERKPP => ERK; ERKdeactivation_V*ERKPP/(ERKdeactivation_Km + ERKPP);
    ERKdeactivation_V = 1140.258; ERKdeactivation_Km = 35.349632;
  ReceptorDegradation: boundEGFR => degradedEGFR; boundEGFR*ReceptorDegradation_k1;
    ReceptorDegradation_k1 = 0.000001;
end
