// SBML level 2 version 1

model Model_4()
  // Model 4: Two branches plus receptor degradation

  // Compartments:
  compartment cell = 1;

  // Species:
  species EGF in cell = 0;
  species boundEGFR in cell = 0;
  species unboundEGFR in cell = 500/cell;
  species activeSos in cell = 0;
  species inactiveSos in cell = 1200/cell;
  species activeRas in cell = 0;
  species inactiveRas in cell = 1200/cell;
  species cRaf in cell = 1500/cell;
  species cRafPP in cell = 0;
  species MEK in cell = 3000/cell;
  species MEKPP in cell = 0;
  species ERK in cell = 10000/cell;
  species ERKPP in cell = 0;
  species removedSos in cell = 0;
  species PKA in cell = 0;
  species removedcRaf in cell = 0;
  species inactivePKA in cell = 1000/cell;
  species EPAC in cell = 0;
  species inactiveEPAC in cell = 1000/cell;
  species activeRap1 in cell = 0;
  species inactiveRap1 in cell = 1200/cell;
  species BRaf in cell = 1500/cell;
  species BRafPP in cell = 0;
  species activeC3G in cell = 0;
  species inactiveC3G in cell = 1200/cell;
  species Gap in cell = 2400/cell;
  species EPACA in cell = 0;
  species Cilostamide in cell = 0;
  species PKAA in cell = 0;
  species degradedEGFR in cell = 0;

  // Parameters:
  SosKcat = 0.0021806008;
  SosKm = 8176.5664;

  // Reactions:
  SosActivation: inactiveSos + boundEGFR => activeSos + boundEGFR; SosActivation_Kcat*inactiveSos*boundEGFR/(SosActivation_Km + inactiveSos);
    SosActivation_Kcat = 0.72711966; SosActivation_Km = 4145.6067;
  EGFBingingToTheReceptor_forward: EGF + unboundEGFR => boundEGFR; EGFBingingToTheReceptor_forward_k1*EGF*unboundEGFR; EGFBingingToTheReceptor_forward is "EGFBingingToTheReceptor (forward)";
    EGFBingingToTheReceptor_forward_k1 = 5.8005689;
  EGFBingingToTheReceptor_backward: boundEGFR => EGF + unboundEGFR; EGFBingingToTheReceptor_backward_k1*boundEGFR; EGFBingingToTheReceptor_backward is "EGFBingingToTheReceptor (backward)";
    EGFBingingToTheReceptor_backward_k1 = 9834.1328;
  SosDeactivation: activeSos => inactiveSos; SosDeactivation_V*activeSos/(SosDeactivation_Km + activeSos);
    SosDeactivation_Km = 20149.951; SosDeactivation_V = 13.731253;
  RasActivation: inactiveRas + activeSos => activeRas + activeSos; RasActivation_Kcat*inactiveRas*activeSos/(RasActivation_Km + inactiveRas);
    RasActivation_Kcat = 0.35171144; RasActivation_Km = 12457.816;
  RasDeactivation1: activeRas + Gap => inactiveRas + Gap; RasDeactivation1_Kcat*activeRas*Gap/(RasDeactivation1_Km + activeRas);
    RasDeactivation1_Kcat = 2.2405874; RasDeactivation1_Km = 1961.7903;
  cRafActivation: cRaf + activeRas => cRafPP + activeRas; cRafActivation_Kcat*cRaf*activeRas/(cRafActivation_Km + cRaf);
    cRafActivation_Kcat = 1.2990938; cRafActivation_Km = 5930.7869;
  cRafDeactivation: cRafPP => cRaf; cRafDeactivation_V*cRafPP/(cRafDeactivation_Km + cRafPP);
    cRafDeactivation_Km = 4238.6527; cRafDeactivation_V = 9815.0778;
  MEKactivation: MEK + cRafPP => MEKPP + cRafPP; MEKactivation_Kcat*MEK*cRafPP/(MEKactivation_Km + MEK);
    MEKactivation_Kcat = 4.4431196; MEKactivation_Km = 712.53116;
  MEKdeactivation: MEKPP => MEK; MEKdeactivation_V*MEKPP/(MEKdeactivation_Km + MEKPP);
    MEKdeactivation_Km = 10188.05; MEKdeactivation_V = 378.40644;
  ERKactivation: ERK + MEKPP => ERKPP + MEKPP; ERKactivation_Kcat*ERK*MEKPP/(ERKactivation_Km + ERK);
    ERKactivation_Kcat = 0.55434435; ERKactivation_Km = 867.63158;
  SosInhibition: inactiveSos + ERKPP => removedSos + ERKPP; SosKcat*inactiveSos*ERKPP/(SosKm + inactiveSos);
  activeSosInhibition: activeSos + ERKPP => removedSos + ERKPP; SosKcat*activeSos*ERKPP/(SosKm + activeSos);
  cRafInhibition: cRaf + PKA => removedcRaf + PKA; cRafInhibition_Kcat*cRaf*PKA/(cRafInhibition_Km + cRaf);
    cRafInhibition_Kcat = 44.583144; cRafInhibition_Km = 3767.4921;
  PKAActivation1: inactivePKA + PKAA => PKA + PKAA; PKAActivation1_Kcat*inactivePKA*PKAA/(PKAActivation1_Km + inactivePKA);
    PKAActivation1_Kcat = 6.0646871; PKAActivation1_Km = 4395.2106;
  PKAactivation2: inactivePKA + Cilostamide => PKA + Cilostamide; PKAactivation2_Kcat*inactivePKA*Cilostamide/(PKAactivation2_Km + inactivePKA);
    PKAactivation2_Kcat = 0.99474461; PKAactivation2_Km = 15124.941;
  PKADeactivation: PKA => inactivePKA; PKADeactivation_V*PKA/(PKADeactivation_Km + PKA);
    PKADeactivation_Km = 810.86912; PKADeactivation_V = 6000.7723;
  EPACActivation1: inactiveEPAC + EPACA => EPAC + EPACA; EPACActivation1_Kcat*inactiveEPAC*EPACA/(EPACActivation1_Km + inactiveEPAC);
    EPACActivation1_Kcat = 1.2089732; EPACActivation1_Km = 1130.7611;
  EPACActivation2: inactiveEPAC + Cilostamide => EPAC + Cilostamide; EPACActivation2_Kcat*inactiveEPAC*Cilostamide/(EPACActivation2_Km + inactiveEPAC);
    EPACActivation2_Kcat = 4.2268381; EPACActivation2_Km = 2251.4608;
  EPACDeactivation: EPAC => inactiveEPAC; EPACDeactivation_V*EPAC/(EPACDeactivation_Km + EPAC);
    EPACDeactivation_Km = 13413.194; EPACDeactivation_V = 994.69179;
  Rap1ActivationByEPAC: inactiveRap1 + EPAC => activeRap1 + EPAC; Rap1ActivationByEPAC_Kcat*inactiveRap1*EPAC/(Rap1ActivationByEPAC_Km + inactiveRap1);
    Rap1ActivationByEPAC_Kcat = 0.002914668; Rap1ActivationByEPAC_Km = 6808.3228;
  Rap1Deactivation: activeRap1 + Gap => inactiveRap1 + Gap; Rap1Deactivation_Kcat*activeRap1*Gap/(Rap1Deactivation_Km + activeRap1);
    Rap1Deactivation_Kcat = 14.645376; Rap1Deactivation_Km = 17991.179;
  BRafActivation: BRaf + activeRap1 => BRafPP + activeRap1; BRafActivation_Kcat*BRaf*activeRap1/(BRafActivation_Km + BRaf);
    BRafActivation_Kcat = 10.66229; BRafActivation_Km = 5507.8916;
  BRafDeactivation: BRafPP => BRaf; BRafDeactivation_V*BRafPP/(BRafDeactivation_Km + BRafPP);
    BRafDeactivation_Km = 549.7896; BRafDeactivation_V = 4.0202064;
  MEKactivation2: MEK + BRafPP => MEKPP + BRafPP; MEKactivation2_Kcat*MEK*BRafPP/(MEKactivation2_Km + MEK);
    MEKactivation2_Kcat = 0.29908629; MEKactivation2_Km = 3386.3875;
  C3GActivation: inactiveC3G + boundEGFR => activeC3G + boundEGFR; C3GActivation_Kcat*inactiveC3G*boundEGFR/(C3GActivation_Km + inactiveC3G);
    C3GActivation_Kcat = 0.21365316; C3GActivation_Km = 10309.918;
  C3GDeactivation: activeC3G => inactiveC3G; C3GDeactivation_V*activeC3G/(C3GDeactivation_Km + activeC3G);
    C3GDeactivation_V = 2427.0883; C3GDeactivation_Km = 3566.0051;
  Rap1ActivationByC3G: inactiveRap1 + activeC3G => activeRap1 + activeC3G; Rap1ActivationByC3G_Kcat*inactiveRap1*activeC3G/(Rap1ActivationByC3G_Km + inactiveRap1);
    Rap1ActivationByC3G_Kcat = 4.1908057; Rap1ActivationByC3G_Km = 7631.6306;
  BRafActivationByRas: BRaf + activeRas => BRafPP + activeRas; BRafActivationByRas_Kcat*BRaf*activeRas/(BRafActivationByRas_Km + BRaf);
    BRafActivationByRas_Kcat = 28.282332; BRafActivationByRas_Km = 5249.0021;
  ERKdeactivation: ERKPP => ERK; ERKdeactivation_V*ERKPP/(ERKdeactivation_Km + ERKPP);
    ERKdeactivation_Km = 1124.3293; ERKdeactivation_V = 325.22591;
  ReceptorDegradation: boundEGFR => degradedEGFR; boundEGFR*ReceptorDegradation_k1;
    ReceptorDegradation_k1 = 4.299718;
end
