// SBML level 2 version 4

model MAPK_pathway_final()

  // Compartments:
  compartment uVol = 1;

  // Species:
  species MKKK in uVol = 81.94; MKKK is "Mos";
  species MKKK_P in uVol = 18.06; MKKK_P is "Mos-P";
  species MKK in uVol = 272.22; MKK is "Mek1";
  species MKK_P in uVol = 19.93; MKK_P is "Mek1-P";
  species MKK_PP in uVol = 7.85; MKK_PP is "Mek1-PP";
  species MAPK in uVol = 288.5; MAPK is "Erk2";
  species MAPK_P in uVol = 8.92; MAPK_P is "Erk2-P";
  species MAPK_PP in uVol = 2.93; MAPK_PP is "Erk2-PP";
  species ras_gtp in uVol = 333; ras_gtp is "Ras-GTP";
  species total_mapk_activated in uVol; total_mapk_activated is "Total MAPK activated";
  species total_mek in uVol; total_mek is "Total MEK activated";

  // Parameters:
  parameter_1 = 0.585; parameter_1 is "Raf activation by Ras catalytic constant";
  parameter_2 = 1.19e-6; parameter_2 is "Raf activation by Ras michaelis constant";
  parameter_3 = 10.8; parameter_3 is "Raf inactivation by ERK_pp, catalytic constant";
  parameter_4 = 3.45; parameter_4 is "Raf inactivation by ERK_pp, michaelis constant";
  parameter_5 = 0.6; parameter_5 is "MEK-p dephosphorylation by ERK_pp, catalytic constant";
  parameter_6 = 5; parameter_6 is "MEK-p dephosphorylation by ERK_pp, michaelis constant";
  kcat5 = 0.75; kcat5 is "MEK dephosphorylation, catalytic constant";
  km5 = 15; km5 is "MEK dephosphorylation, michaelis constant";
  kcat9 = 0.5; kcat9 is "ERK dephosphorylation, catalytic constant";
  km9 = 15; km9 is "ERK dephosphorylation, michaelis constant";
  kcat7 = 0.025; kcat7 is "ERK phosphorylation, catalytic constant";
  km7 = 15; km7 is "ERK phosphorylation, michaelis constant";
  kcat3 = 0.025; kcat3 is "MEK phosphorylation, catalytic constant";
  km3 = 15; km3 is "MEK phosphorylation, michaelis constant";

  // Assignment rules:
  total_mapk_activated := MAPK_P + MAPK_PP;
  total_mek := MKK_P + MKK_PP;

  // Reactions:
  J1: MKKK_P => MKKK; MKKK_P*V2*uVol*(1/(KK2 + MKKK_P)); J1 is "MAPKKK inactivation";
    V2 = 0.25; KK2 = 8;
  J2: MKK => MKK_P; MKK*MKKK_P*kcat3*uVol*(1/(km3 + MKK)); J2 is "phosphorylation of MAPKK";  // modifiers: MKKK_P
  J3: MKK_P => MKK_PP; MKKK_P*MKK_P*kcat3*uVol*(1/(MKK_P + km3)); J3 is "phosphorylation of MAPKK-P";  // modifiers: MKKK_P
  J4: MKK_PP => MKK_P; MKK_PP*kcat5*uVol*(1/(MKK_PP + km5)); J4 is "dephosphorylation of MAPKK-PP";
  J5: MKK_P => MKK; MKK_P*kcat5*uVol*(1/(MKK_P + km5)); J5 is "dephosphorylation of MAPKK-P";
  J6: MAPK => MAPK_P; MAPK*MKK_PP*kcat7*uVol*(1/(km7 + MAPK)); J6 is "phosphorylation of MAPK";  // modifiers: MKK_PP
  J7: MAPK_P => MAPK_PP; MAPK_P*MKK_PP*kcat7*uVol*(1/(km7 + MAPK_P)); J7 is "phosphorylation of MAPK-P";  // modifiers: MKK_PP
  J8: MAPK_PP => MAPK_P; MAPK_PP*kcat9*uVol*(1/(km9 + MAPK_PP)); J8 is "dephosphorylation of MAPK-PP";
  J9: MAPK_P => MAPK; MAPK_P*kcat9*uVol*(1/(km9 + MAPK_P)); J9 is "dephosphorylation of MAPK-P";
  Raf_activation_by_Ras: MKKK => MKKK_P; MKKK*parameter_1*ras_gtp*(1/(MKKK + parameter_2));  // modifiers: ras_gtp
  Negative_feedback_2: MKKK_P => MKKK; MAPK_PP*MKKK_P*parameter_3*(1/(MKKK_P + parameter_4));  // modifiers: MAPK_PP
  Negative_feedback_2: MKK_P => MKK; MAPK_PP*MKK_P*parameter_5*(1/(MKK_P + parameter_6));  // modifiers: MAPK_PP

  // Unit definitions:
  unit substance = 1e-9 mole; substance is "nanomole";
end
