// SBML level 2 version 1

function HMM(substrate, Km, V)
  V*substrate/(Km + substrate);
end

function EXPLE(V, substrate, modifier, Km)
  V*substrate*modifier/(Km + substrate);
end

model Model3()
  // Case Study 1, Model 3 (Incorrect)

  // Compartments:
  compartment compartment = 1;

  // Species:
  species R in compartment = 1;
  species Rpp in compartment = 0;
  species S in compartment = 1;

  // Parameters:
  Noise = 0.4;

  // Reactions:
  R1: R => Rpp; compartment*EXPLE(R1_V, R, S, R1_Km);  // modifiers: S
    R1_V = 0.1; R1_Km = 0.1;
  R2: Rpp => R; compartment*HMM(Rpp, R2_Km, R2_V);
    R2_Km = 0.1; R2_V = 0.1;
end
