// SBML level 2 version 1

model Model4()
  // Case Study 1, Model 4 (overcomplicated)

  // Compartments:
  compartment compartment = 1;

  // Species:
  species S in compartment = 1;
  species dS in compartment = 0;
  species R in compartment = 1;
  species RS in compartment = 0;
  species Rpp in compartment = 0;
  species PhA in compartment = 1;
  species RppPhA in compartment = 0;

  // Parameters:
  Noise = 0.06;

  // Reactions:
  R1: S => dS; compartment*R1_k1*S;
    R1_k1 = 0.05;
  R2: R + S -> RS; compartment*(R2_k1*R*S - R2_k2*RS);
    R2_k1 = 0.4; R2_k2 = 0.02;
  R3: RS => Rpp; compartment*R3_k1*RS;
    R3_k1 = 0.4;
  R4: Rpp + PhA -> RppPhA; compartment*(R4_k1*Rpp*PhA - R4_k2*RppPhA);
    R4_k1 = 0.01; R4_k2 = 0.005;
  R5: RppPhA => R + PhA; compartment*R5_k1*RppPhA;
    R5_k1 = 0.005;
end
