// SBML level 2 version 4
// Correct-model.sbml: A Ras small GTPase molecular switch dynamic model.
//   Copyright (C) 2020  Marcelo S. Reis and Gustavo Estrela.
//   This program is free software: you can redistribute it and/or modify
//   it under the terms of the GNU General Public License as published by
//   the Free Software Foundation, either version 3 of the License, or
//   (at your option) any later version.
//   This program is distributed in the hope that it will be useful,
//   but WITHOUT ANY WARRANTY; without even the implied warranty of
//   MERCHANTABILITY or FITNESS FOR A PARTICULAR PURPOSE.  See the
//   GNU General Public License for more details.
//   You should have received a copy of the GNU General Public License
//   along with this program.  If not, see <http://www.gnu.org/licenses/>.

model main()

  // Compartments:
  compartment cell = 1;

  // Species:
  species SOS in cell = 200/cell;
  species SOS_allo_RasGDP in cell = 0;
  species SOS_allo_RasGTP in cell = 0;
  species RasGDP in cell = 900/cell;
  species RasGTP in cell = 100/cell;
  species GEF in cell = 200/cell;
  species GAP in cell = 125/cell;
  species iGAP in cell = 275/cell;

  // Parameters:
  k1 = 1.8e-4;
  d1 = 3;
  k2 = 1.7e-4;
  d2 = 0.04;
  k3cat = 3.8;
  K3m = 1.64e3;
  k4cat = 0.003;
  K4m = 9.12e3;
  k5cat = 0.1;
  K5m = 1.07e2;
  k6cat = 0.01;
  K6m = 1836;

  // Reactions:
  SOS_allo_RasGDP_complexation: RasGDP + SOS -> SOS_allo_RasGDP; k1*SOS*RasGDP;
  SOS_allo_RasGDP_decomplexation: SOS_allo_RasGDP -> RasGDP + SOS; d1*SOS_allo_RasGDP;
  SOS_allo_RasGTP_complexation: RasGTP + SOS -> SOS_allo_RasGTP; k2*SOS*RasGTP;
  SOS_allo_RasGTP_decomplexation: SOS_allo_RasGTP -> RasGTP + SOS; d2*SOS_allo_RasGTP;
  Ras_inactivation_by_GAP: RasGTP + GAP -> RasGDP + GAP; k5cat*GAP*RasGTP/(K5m + RasGTP);
  Ras_activation_by_SOS_allo_RasGTP: RasGDP + SOS_allo_RasGTP -> RasGTP + SOS_allo_RasGTP; k3cat*SOS_allo_RasGTP*RasGDP/(K3m + RasGDP);
  Ras_activation_by_SOS_allo_RasGDP: RasGDP + SOS_allo_RasGDP -> RasGTP + SOS_allo_RasGDP; k4cat*SOS_allo_RasGDP*RasGDP/(K4m + RasGDP);
  Ras_activation_by_GEF: RasGDP + GEF -> RasGTP + GEF; k6cat*GEF*RasGDP/(K6m + RasGDP);
end
