// SBML level 2 version 1

model Model1()
  // Model 1

  // Compartments:
  compartment compartment = 1;

  // Species:
  species A in compartment = 200;
  species B in compartment = 20;
  species AB in compartment = 0;
  species C in compartment = 200;

  // Reactions:
  A_B_AB: A + B => AB; compartment*k1*A*B; A_B_AB is "A + B -> AB";
    k1 = 1.7e-4;
  AB_A_B: AB -> A + B; compartment*k2*AB; AB_A_B is "AB -> A + B";
    k2 = 0.4;
  C_B_with_enzyme_AB: C => B; compartment*(kcat3*AB*C/(Km3 + C)); C_B_with_enzyme_AB is "C -> B with enzyme AB";
    kcat3 = 2; Km3 = 1.64e3;
  B_C_with_constant_enzyme: B -> C; compartment*(V4*B/(Km4 + B)); B_C_with_constant_enzyme is "B -> C with constant enzyme";
    V4 = 1; Km4 = 1.07e2;
  C_A_with_constant_enzyme: C -> A; compartment*(V5*C/(Km5 + C)); C_A_with_constant_enzyme is "C -> A with constant enzyme";
    V5 = 0.21; Km5 = 140;
end
