// SBML level 2 version 1

model Model4()
  // Model 4

  // Compartments:
  compartment compartment = 1;

  // Species:
  species A in compartment = 200;
  species B in compartment = 20;
  species AB in compartment = 0;
  species C in compartment = 200;

  // Reactions:
  A_B_AB: A + B => AB; compartment*k1*A*B; A_B_AB is "A + B -> AB";
    k1 = 1.7e-4;
  AB_A_B: AB -> A + B; compartment*k2*AB; AB_A_B is "AB -> A + B";
    k2 = 0.4;
  B_C_with_enzyme_AB: B => C; compartment*(kcat3*AB*B/(Km3 + B)); B_C_with_enzyme_AB is "B -> C with enzyme AB";
    kcat3 = 2; Km3 = 1.64e3;
  C_B_with_constant_enzyme: C -> B; compartment*(V4*C/(Km4 + C)); C_B_with_constant_enzyme is "C -> B with constant enzyme";
    V4 = 1; Km4 = 1.07e2;
end
