// SBML level 2 version 1

function HMM(substrate, Km, V)
  V*substrate/(Km + substrate);
end

function EXPLE(V, substrate, modifier, Km)
  V*substrate*modifier/(Km + substrate);
end

model Model2()
  // Case Study 1, Model 2 (Simplistic)

  // Compartments:
  compartment compartment = 1;

  // Species:
  species S in compartment = 1;
  species dS in compartment = 0;
  species R in compartment = 1;
  species Rpp in compartment = 0;

  // Parameters:
  Noise = 0.4;

  // Reactions:
  R1: S => dS; compartment*k1*S;
    k1 = 0.1;
  R2: R => Rpp; compartment*EXPLE(R2_V, R, S, R2_Km);  // modifiers: S
    R2_V = 0.1; R2_Km = 0.1;
  R3: Rpp => R; compartment*HMM(Rpp, R3_Km, R3_V);
    R3_Km = 0.1; R3_V = 0.1;
end
