// SBML level 2 version 1

model Model1()
  // Case Study 1, Model 1 (realistic)

  // Compartments:
  compartment compartment = 1;

  // Species:
  species S in compartment = 1;
  species dS in compartment = 0;
  species R in compartment = 1;
  species RS in compartment = 0;
  species unused in comparment = 10;
  species Rpp in compartment = 0;

  // Reactions:
  R1: S => dS; compartment*R1_k1*S;
    R1_k1 = 0.07;
  R2: R + S -> RS; compartment*(R2_k1*R*S - k2*RS);
    R2_k1 = 0.6; k2 = 0.05;
  R3: RS => Rpp; compartment*R3_k1*RS;
    R3_k1 = 0.3;
  R4: Rpp -> R; compartment*(V*Rpp/(Km + Rpp));
    V = 0.017; Km = 0.3;
end
